new TPXcode.tpx_6_Voluta   Nphases=3 units=mile Normamps=85  kron=y Rc=0.8050 Rn=0.806 GMRc=0.0056 GMRn=0.0064 T=45 Dc=0.184 Dn=0.198 Runits=kft GMRunits=Ft Dunits=in Tunits=mils
new TPXcode.tpx_3/0_Mursia Nphases=3 units=mile Normamps=275 kron=y Rc=0.1260 Rn=0.144 GMRc=0.0140 GMRn=0.0161 T=60 Dc=0.464 Dn=0.502 Runits=kft GMRunits=Ft Dunits=in Tunits=mils
new TPXcode.tpx_2/0_Runcina Nphases=3 units=mile Normamps=235 kron=y Rc=0.1590 Rn=0.176 GMRc=0.0125 GMRn=0.0143 T=60 Dc=0.414 Dn=0.447 Runits=kft GMRunits=Ft Dunits=in Tunits=mils
